module test;
clock {
	starttime '2018-01-01 00:00:00';
	stoptime '2018-01-01 1:00:00';
}
class text {
	randomvar x[MW];
}

object test {
	name "my_test";
	x "type:lognormal(0,1); refresh:5min";
	on_commit python:test.commit;

}
